!   Commands inserted into this file will be executed just prior to the ANSYS SOLVE command.

!   These commands may supersede command settings set by Workbench.


!   Active UNIT system in Workbench when this object was created:  Metric (m, kg, N, s, V, A)

!   NOTE:  Any data that requires units (such as mass) is assumed to be in the consistent solver unit system.

!                See Solving Units in the help system for more information.


!Begin Phase---------------------


cms_modes = 200 !Number of Modes for CMS


/filname,Super_EL,1 !Super Element/Reduced Model Name


!Solution Phase------------------

/SOLU


antype,substr !Analysis Definition set to Substructuring

seopt,Super_EL,2,2 !Super_EL is selected, K and M are generated. Only load vector is printed

cmsopt,free,cms_modes,,,FNUM,6 ! Fixed interface method/Hurty/Craig-Bampton Method is used


cmsel,s,Master_Nodes ! Nodes present in Master_Nodes (Named Selection) are used as master nodes

M,all,all ! Define Master Nodes, "all" indicates all DoFs. UX, UY and UZ can be used as well but may not solve for free-free condition.

!MLIST

NLIST,Master_Nodes ! Print the Nodes in MN_xmm

allsel ! Select the entire model

SOLVE

FINISH

! Begin-Phase

FINISH

/clear,nostart

num_mode = 1000

/filname,Super_EL_ROM,1

!Pre-processor Phase--------------

/PREP7

! Element Type

et,1,matrix50

! Write Element File

EMATWRITE,yes

! Reduced Model Name

type,1

se,Super_EL

FINISH
/SOLU
nummode = 1000

ANTYPE,modal

MODOPT,LANB,nummode,,,,,,16

WRFULL,1

BCSOPTION,,INCORE

SOLVE

! Auxiliary-Phase----------------

/OUTPUT,MAT_HCB,txt

/AUX2

/HEADER,defa
/format,defa
! Reduced Order Matrices [K] and [M]

file,Super_EL_ROM,full

HBMAT,MredHB,txt,,ascii,MASS,yes,yes
HBMAT,KredHB,txt,,ascii,STIFF,yes,yes
*SMAT, Kred, D, import, full, Super_EL_ROM.full, STIFF
*SMAT, Mred, D, import, full, Super_EL_ROM.full, MASS
*EXPORT, Kred,mmf,Kred_Sparse
*EXPORT, Mred,mmf,Mred_Sparse
*SMAT,NodToSolv,D,IMPORT,FULL,Super_EL_ROM.full,NOD2SOLV_ROM
*PRINT,NodToSolv,N2D.txt

FINISH
